// SBML level 2 version 3

model GPGeneratedModel()

  // Species:
  substanceOnly species Raf1Star in compartment = 0.025;
  substanceOnly species RKIP in compartment = 0.025;
  substanceOnly species Raf1Star|RKIP in compartment = 0;
  substanceOnly species ERKPP in compartment = 0;
  substanceOnly species Raf1Star|RKIP|ERKPP in compartment = 0;
  substanceOnly species ERK in compartment = 0.025;
  substanceOnly species RKIPP in compartment = 0;
  substanceOnly species MEKPP in compartment = 0.025;
  substanceOnly species MEKPP|ERK in compartment = 0;
  substanceOnly species RP in compartment = 0.03;
  substanceOnly species RP|RKIPP in compartment = 0;

  // Parameters:
  k0 = 0.239157;
  k1 = 0.1803503;
  k2 = 0.1027907;
  k3 = 0.2343353;
  k4 = 0.6965243;
  k5 = 0.3999251;

  // Reactions:
  r0: Raf1Star|RKIP => Raf1Star + RKIPP; k0*Raf1Star|RKIP;
  r1: MEKPP|ERK => MEKPP + ERKPP; k1*MEKPP|ERK;
  r2: MEKPP + ERK => MEKPP|ERK; k2*MEKPP*ERK;
  r3: RP + RKIPP => RP|RKIPP; k3*RP*RKIPP;
  r4: Raf1Star|RKIP|ERKPP => Raf1Star + RKIPP; k4*Raf1Star|RKIP|ERKPP;
  r5: Raf1Star + RKIP => Raf1Star|RKIP; k5*Raf1Star*RKIP;
end
